<?xml version="1.0"?>
<!-- $Id: LZ-129_crew_ap.xml,v 1.3 2006-11-26 13:36:35 anders Exp $ -->
<!--

  Author:   Anders Gidenstam
  Date:     11 November 2006
  Function: Simulation of the rudder and elevator coxswains etc on the LZ-129.

-->

<autopilot name="LZ-129 Crew Autopilot">

  <!-- INTERFACE PROPERTIES -->
  <property>ap/rudder-coxswain-active</property>
  <property>ap/heading-setpoint-degrees</property>
  <property>ap/rudder-cmd-norm</property>
  <property>ap/elevator-coxswain-active</property>
  <property>ap/pitch-setpoint-degrees</property>
  <property>ap/elevator-cmd-norm</property>

  <!-- SENSORS -->

  <!-- CHANNELS -->

  <channel name="fcs/ap-rudder-coxswain">

    <!-- The heading error chain is from c172ap.xml by Jon Berndt. -->
    <pure_gain name="fcs/heading-true-degrees">
      <input>attitude/heading-true-rad</input>
      <gain>57.3</gain> <!-- convert to degrees -->
    </pure_gain>

    <summer name="fcs/heading-error">
      <input> -fcs/heading-true-degrees</input>
      <input> ap/heading-setpoint-degrees </input>
    </summer>

    <switch name="fcs/heading-error-bias-switch">
      <default value="0.0"/>
      <test value="360.0">
        fcs/heading-error lt -180
      </test>
      <test value="-360.0">
        fcs/heading-error gt 180
      </test>
    </switch>

    <summer name="fcs/heading-corrected">
      <input> fcs/heading-error-bias-switch </input>
      <input> fcs/heading-error </input>
      <clipto>
        <min>-30</min>
        <max> 30</max>
      </clipto>
    </summer>

    <pid name="Heading AP PID">
      <input> fcs/heading-corrected </input>
      <kp>   8.0  </kp>
      <ki>   0.05 </ki>
      <kd> 100.5  </kd>
      <clipto>
        <min>-1.0</min>
        <max> 1.0</max>
      </clipto>
    </pid>

    <switch name="Heading AP Autoswitch">
      <default value="0.0"/>
      <test logic="AND" value="fcs/heading-ap-pid">
            ap/rudder-coxswain-active == 1
      </test>
    </switch>

    <pure_gain name="Heading AP Rudder Command Normalizer">
      <input>fcs/heading-ap-autoswitch</input>
      <gain>-1</gain>
      <output>ap/rudder-cmd-norm</output>
    </pure_gain>

  </channel>

  <channel name="fcs/ap-elevator-coxswain">

    <pure_gain name="fcs/ap-pitch-setpoint-rad">
      <input> ap/pitch-setpoint-degrees </input>
      <gain>0.017453</gain>
    </pure_gain>

    <summer name="fcs/pitch-error">
      <input> attitude/theta-rad</input>
      <input> -fcs/ap-pitch-setpoint-rad </input>
    </summer>

    <pid name="Pitch AP PID">
      <input> fcs/pitch-error </input>
      <kp>   5.00 </kp>
      <ki>   0.05 </ki>
      <kd> 100.00  </kd>
      <clipto>
        <min>-1.0</min>
        <max> 1.0</max>
      </clipto>
    </pid>

    <switch name="Pitch AP Autoswitch">
      <default value="0.0"/>
      <test logic="AND" value="fcs/pitch-ap-pid">
            ap/elevator-coxswain-active == 1
      </test>
    </switch>

    <pure_gain name="Pitch AP Elevator Command Normalizer">
      <input>fcs/pitch-ap-autoswitch</input>
      <gain>1</gain>
      <output>ap/elevator-cmd-norm</output>
    </pure_gain>

  </channel>

  <channel name="fcs/ap-boyancy-weigh-off">

  </channel>

</autopilot>
